*Heading
 Generate the Stiffness Matrix!
** Job name: StiffnessMatrixGen Model name: Model-1
** Generated by: Abaqus/CAE 2022
*Preprint, echo=NO, model=NO, history=NO, contact=NO
**
** PARTS
**
*Part, name=Bar
*Node
      1,          40.,          10.,         400.
      2,          40.,           0.,         400.
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*Element, type=C3D8I
  1,  83,  84,  86,  85,   1,   2,   4,   3
  2,  85,  86,  88,  87,   3,   4,   6,   5
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*Nset, nset=Set-1, generate
   1,  410,    1
*Elset, elset=Set-1, generate
   1,  160,    1
** Section: BarSection
*Solid Section, elset=Set-1, material=Metal
,
*End Part
**
**
** ASSEMBLY
**
*Assembly, name=Assembly
**
*Instance, name=Bar-1, part=Bar
*End Instance
**
*End Assembly
**
** MATERIALS
**
*Material, name=Metal
*Elastic
209000., 0.3
