*Heading
** Job name: Job-1 Model name: Model-1
** Generated by: Abaqus/CAE 2022
*Preprint, echo=NO, model=NO, history=NO, contact=NO
**
** PARTS
**
*Part, name=Part-1
*Node
      1,          40.,          10.,         400.
      2,          40.,           5.,         400.
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*Element, type=C3D8
   1,  244,  245,  248,  247,    1,    2,    5,    4
   2,  245,  246,  249,  248,    2,    3,    6,    5
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*Nset, nset=Set-1, generate
    1,  2187,     1
*Elset, elset=Set-1, generate
    1,  1280,     1
** Section: Section-1
*Solid Section, elset=Set-1, material=Generic_Metal
,
*End Part
**
**
** ASSEMBLY
**
*Assembly, name=Assembly
**
*Instance, name=Part-1-1, part=Part-1
*End Instance
**
*Nset, nset=_PickedSet4, internal, instance=Part-1-1, generate
    1,  2187,     1
*Elset, elset=_PickedSet4, internal, instance=Part-1-1, generate
    1,  1280,     1
*End Assembly
**
** MATERIALS
**
*Material, name=Generic_Metal
*Elastic
72000., 0.3
**
** PREDEFINED FIELDS
**
** Name: Predefined Field-1   Type: Stress
*Initial Conditions, type=STRESS
_PickedSet4, 0., 0., 100., 0., 0., 0.
** ----------------------------------------------------------------
**
** STEP: Step-1
**
*Step, name=Step-1, nlgeom=NO
Achieve Equilibrium
*Static
1., 1., 1e-05, 1.
**
** OUTPUT REQUESTS
**
*Restart, write, frequency=0
**
** FIELD OUTPUT: F-Output-1
**
*Output, field, variable=PRESELECT
**
** HISTORY OUTPUT: H-Output-1
**
*Output, history, variable=PRESELECT
*End Step
