*Heading
** Job name: Job-1 Model name: Model-1
** Generated by: Abaqus/CAE 2022
*Preprint, echo=NO, model=NO, history=NO, contact=NO
**
** PARTS
**
*Part, name=no_stress_forces_applied
*Node
      1,           0.,           0.,   204.990524
      2,           0.,           0.,         400.
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*Element, type=C3D8R
    1,   214,   425,    13,     1,  1620,  1831,  1419,  1407
    2,   425,   426,    14,    13,  1831,  1832,  1420,  1419
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*Nset, nset=_PickedSet11, internal, generate
     1,  29526,      1
*Elset, elset=_PickedSet11, internal, generate
     1,  23920,      1
** Section: Section-1
*Solid Section, elset=_PickedSet11, material=Generic-Metal
,
*End Part
**
**
** ASSEMBLY
**
*Assembly, name=Assembly
**
*Instance, name=no_stress_forces_applied-1, part=no_stress_forces_applied
*End Instance
**
*Nset, nset=_PickedSet4, internal, instance=no_stress_forces_applied-1
 14065,
*Nset, nset=_PickedSet5, internal, instance=no_stress_forces_applied-1
 14069,
*Elset, elset=__PickedSurf6_S5, internal, instance=no_stress_forces_applied-1
   613,   614,  1809,  1810,  3005,  3006
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*Surface, type=ELEMENT, name=_PickedSurf6, internal
__PickedSurf6_S5, S5
*Elset, elset=__PickedSurf7_S6, internal, instance=no_stress_forces_applied-1
   393,   491,  1589,  1687,  2785,  2883
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*Surface, type=ELEMENT, name=_PickedSurf7, internal
__PickedSurf7_S6, S6
*End Assembly
**
** MATERIALS
**
*Material, name=Generic-Metal
*Elastic
 2e+11, 0.3
** ----------------------------------------------------------------
**
** STEP: Apply_Forces
**
*Step, name=Apply_Forces, nlgeom=NO
*Static
1., 1., 1e-05, 1.
**
** LOADS
**
** Name: Load-3   Type: Pressure
*Dsload
_PickedSurf6, P, 1e+10
** Name: Load-4   Type: Pressure
*Dsload
_PickedSurf7, P, 1e+10
**
** OUTPUT REQUESTS
**
*Restart, write, frequency=0
**
** FIELD OUTPUT: F-Output-1
**
*Output, field, variable=PRESELECT
**
** HISTORY OUTPUT: H-Output-1
**
*Output, history, variable=PRESELECT
*End Step
