*Heading
** Job name: first_committed_plan Model name: Model-1
** Generated by: Abaqus/CAE 2024
*Preprint, echo=NO, model=NO, history=NO, contact=NO
**
** PARTS
**
*Part, name=Post_Tool_Pass_1
*End Part
**
**
** ASSEMBLY
**
*Assembly, name=Assembly
**
*Instance, name=Post_Tool_Pass_1, part=Post_Tool_Pass_1
*Node
      1,           0.,           5.,   88.9765778
      2,           0.,           5.,   91.0466156
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*Element, type=C3D4
   1, 485, 486, 487, 488
   2,  84, 489,  85, 490
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*Nset, nset=simple_set, generate
   1,  643,    1
*Elset, elset=simple_set, generate
    1,  2173,     1
** Section: Section-1
*Solid Section, elset=simple_set, material=Material-1
,
*End Instance
**
*Nset, nset=_PickedSet13, internal, instance=Post_Tool_Pass_1
   9,  10,  17,  18, 102, 157, 158, 159, 465
*Elset, elset=_PickedSet13, internal, instance=Post_Tool_Pass_1
 1045, 1046, 1049, 1051, 1643, 1644, 1721, 2159
*Nset, nset=_PickedSet20, internal, instance=Post_Tool_Pass_1
  13,  14,  15,  16, 122, 139, 140, 141, 227
*Elset, elset=_PickedSet20, internal, instance=Post_Tool_Pass_1
  604, 1041, 1138, 1674, 1695, 1986, 1987, 2073
*End Assembly
**
** MATERIALS
**
*Material, name=Material-1
*Elastic
 1e+09, 0.3
**
** BOUNDARY CONDITIONS
**
** Name: Boundary_Condition_0 Type: Displacement/Rotation
*Boundary
_PickedSet13, 1, 1
_PickedSet13, 2, 2
_PickedSet13, 3, 3
_PickedSet13, 4, 4
_PickedSet13, 5, 5
_PickedSet13, 6, 6
** Name: Boundary_Condition_1 Type: Displacement/Rotation
*Boundary
_PickedSet20, 1, 1
_PickedSet20, 2, 2
_PickedSet20, 3, 3
_PickedSet20, 4, 4
_PickedSet20, 5, 5
_PickedSet20, 6, 6
** ----------------------------------------------------------------
**
** STEP: Equilibrate_User_Specified_Stresses
**
*Initial Conditions, Type=Stress, User
*Step, name=Equilibrate_User_Specified_Stresses, nlgeom=NO
*Static
1., 1., 1e-05, 1.
**
** OUTPUT REQUESTS
**
*Restart, write, frequency=0
**
** FIELD OUTPUT: F-Output-1
**
*Output, field, variable=PRESELECT
**
** HISTORY OUTPUT: H-Output-1
**
*Output, history, variable=PRESELECT
*End Step
** ----------------------------------------------------------------
**
** STEP: Deform_Due_To_Material_Removal
**
*Step, name=Deform_Due_To_Material_Removal, nlgeom=NO
*Static
1., 1., 1e-05, 1.
**
** OUTPUT REQUESTS
**
*Restart, write, frequency=0
**
** FIELD OUTPUT: F-Output-1
**
*Output, field, variable=PRESELECT
**
** HISTORY OUTPUT: H-Output-1
**
*Output, history, variable=PRESELECT
*End Step
