*Heading
** Job name: Job-1 Model name: Model-1
** Generated by: Abaqus/CAE 2023
*Preprint, echo=NO, model=NO, history=NO, contact=NO
**
** PARTS
**
*Part, name=Part-1
*End Part
**
**
** ASSEMBLY
**
*Assembly, name=Assembly
**
*Instance, name=Part-1-1, part=Part-1
*Node
      1,         -20.,           0.,           0.
      2,          20.,           0.,           0.
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*Element, type=C3D8R
  1,   2,  17, 100,  29, 109, 124, 207, 136
  2,  19,  53,  93,  18, 126, 160, 200, 125
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*Nset, nset=Set-1, generate
   1,  856,    1
*Elset, elset=Set-1, generate
   1,  623,    1
** Section: Section-1
*Solid Section, elset=Set-1, material=Material-1
,
*End Instance
**
*Nset, nset=Set-2, instance=Part-1-1, generate
   1,  856,    1
*Elset, elset=_Surf-1_S6, internal, instance=Part-1-1
   1,   2,   9,  17,  21,  22
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*Elset, elset=_Surf-1_S4, internal, instance=Part-1-1
   5,   7,  19,  83,  94,  96
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*Elset, elset=_Surf-1_S5, internal, instance=Part-1-1, generate
  15,  549,   89
*Surface, type=ELEMENT, name=Surf-1
_Surf-1_S6, S6
_Surf-1_S4, S4
_Surf-1_S5, S5
*Elset, elset=_Surf-2_S3, internal, instance=Part-1-1, generate
   1,  535,   89
*Elset, elset=_Surf-2_S6, internal, instance=Part-1-1
   4,   6,  13,  24,  27,  93
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*Elset, elset=_Surf-2_S4, internal, instance=Part-1-1
   8,  10,  15,  25,  28,  29
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*Surface, type=ELEMENT, name=Surf-2
_Surf-2_S3, S3
_Surf-2_S6, S6
_Surf-2_S4, S4
*Elset, elset=_Surf-3_S2, internal, instance=Part-1-1, generate
 535,  623,    1
*Surface, type=ELEMENT, name=Surf-3
_Surf-3_S2, S2
**
** INTEGRATED OUTPUT SECTIONS
**
*Integrated Output Section, name=I-Section-1, surface=Surf-1, project orientation=NO
*Integrated Output Section, name=I-Section-2, surface=Surf-2, project orientation=NO
*Integrated Output Section, name=I-Section-3, surface=Surf-3, project orientation=NO
*End Assembly
**
** MATERIALS
**
*Material, name=Material-1
*Elastic
 1e+09, 0.3
**
** BOUNDARY CONDITIONS
**
** Name: BC-1 Type: Displacement/Rotation
*Boundary
Set-2, 1, 1
Set-2, 2, 2
Set-2, 3, 3
Set-2, 4, 4
Set-2, 5, 5
Set-2, 6, 6
** ----------------------------------------------------------------
**
** STEP: Step-1
**
*Initial Conditions, Type=Stress, User
*Step, name=Step-1, nlgeom=NO
*Static
1., 1., 1e-05, 1.
**
** OUTPUT REQUESTS
**
*Restart, write, frequency=0
**
** FIELD OUTPUT: F-Output-1
**
*Output, field, variable=PRESELECT
**
** HISTORY OUTPUT: H-Output-2
**
*Output, history
*Integrated Output, section=I-Section-1
SOF, SOM
**
** HISTORY OUTPUT: H-Output-3
**
*Integrated Output, section=I-Section-2
SOF, SOM
**
** HISTORY OUTPUT: H-Output-4
**
*Integrated Output, section=I-Section-3
SOF, SOM
**
** HISTORY OUTPUT: H-Output-1
**
*Output, history, variable=PRESELECT
*End Step
