*Heading
** Job name: Job-1 Model name: Model-1
** Generated by: Abaqus/CAE 2023
*Preprint, echo=NO, model=NO, history=NO, contact=NO
**
** PARTS
**
*Part, name=Post_Tool_Pass_1
*End Part
**
**
** ASSEMBLY
**
*Assembly, name=Assembly
**
*Instance, name=Post_Tool_Pass_1, part=Post_Tool_Pass_1
*Node
      1,           7.,           5.,         300.
      2,           3.,           5.,         200.
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*Element, type=C3D4
  1, 249, 246, 245, 154
  2, 250,  13,  12,  94
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*Nset, nset=simple_set, generate
   1,  256,    1
*Elset, elset=simple_set, generate
   1,  619,    1
** Section: Section-1
*Solid Section, elset=simple_set, material=Material-1
,
*End Instance
**
*Nset, nset=_PickedSet13, internal, instance=Post_Tool_Pass_1
   5,   6,   7,   8,  41,  42,  43,  44,  45,  46,  47,  48, 153, 154, 155, 156
*Elset, elset=_PickedSet13, internal, instance=Post_Tool_Pass_1
 131, 173, 214, 257, 270, 271
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*Nset, nset=_PickedSet20, internal, instance=Post_Tool_Pass_1
   9,  10,  11,  12,  49,  50,  91,  92,  93,  94,  95,  96, 193, 194, 195, 196
*Elset, elset=_PickedSet20, internal, instance=Post_Tool_Pass_1
  39, 200, 254, 321, 323, 324
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*End Assembly
**
** MATERIALS
**
*Material, name=Material-1
*Elastic
 1e+09, 0.3
**
** BOUNDARY CONDITIONS
**
** Name: Boundary_Condition_0 Type: Displacement/Rotation
*Boundary
_PickedSet13, 1, 1
_PickedSet13, 2, 2
_PickedSet13, 3, 3
_PickedSet13, 4, 4
_PickedSet13, 5, 5
_PickedSet13, 6, 6
** Name: Boundary_Condition_1 Type: Displacement/Rotation
*Boundary
_PickedSet20, 1, 1
_PickedSet20, 2, 2
_PickedSet20, 3, 3
_PickedSet20, 4, 4
_PickedSet20, 5, 5
_PickedSet20, 6, 6
** ----------------------------------------------------------------
**
** STEP: Equilibrium2
**
*Initial Conditions, Type=Stress, User
*Step, name=Equilibrium2, nlgeom=NO
*Static
1., 1., 1e-05, 1.
**
** OUTPUT REQUESTS
**
*Restart, write, frequency=0
**
** FIELD OUTPUT: F-Output-1
**
*Output, field, variable=PRESELECT
**
** HISTORY OUTPUT: H-Output-1
**
*Output, history, variable=PRESELECT
*End Step
