*Heading
** Job name: Job-1 Model name: Model-1
** Generated by: Abaqus/CAE 2023
*Preprint, echo=NO, model=NO, history=NO, contact=NO
**
** PARTS
**
*Part, name=Part-1
*End Part
**
**
** ASSEMBLY
**
*Assembly, name=Assembly
**
*Instance, name=Part-1-1, part=Part-1
*Node
      1,           0.,          20.,   110.239998
      2,           0.,          15.,   110.239998
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*Element, type=C3D10
   1,  269,  101,  270,  166,  360,  359,  358,  362,  361,  363
   2,  269,  270,  101,  256,  358,  359,  360,  365,  364,  366
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*Nset, nset=Set-1, generate
    1,  2165,     1
*Elset, elset=Set-1, generate
    1,  1186,     1
** Section: Section-1
*Solid Section, elset=Set-1, material=Material-1
,
*End Instance
**
*Node
      1,          20.,         17.5,   89.7600021
*Node
      2,          20.,         17.5,          80.
*Nset, nset=Set-3, instance=Part-1-1
    7,    8,   14,   15,   46,   80
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*Elset, elset=Set-3, instance=Part-1-1
  309,  311,  475,  498,  501,  595,  651,  668,  669,  679,  733,  734,  930,  938, 1133, 1137
*Elset, elset=_Surf-1_S1, internal, instance=Part-1-1
 1054, 1056, 1064
*Elset, elset=_Surf-1_S3, internal, instance=Part-1-1
 1055, 1063, 1065
*Elset, elset=_Surf-1_S4, internal, instance=Part-1-1
 1059, 1085
*Surface, type=ELEMENT, name=Surf-1
_Surf-1_S1, S1
_Surf-1_S3, S3
_Surf-1_S4, S4
*Elset, elset=_Surf-2_S1, internal, instance=Part-1-1
 1054, 1056, 1064
*Elset, elset=_Surf-2_S3, internal, instance=Part-1-1
 1055, 1063, 1065
*Elset, elset=_Surf-2_S4, internal, instance=Part-1-1
 1059, 1085
*Surface, type=ELEMENT, name=Surf-2
_Surf-2_S1, S1
_Surf-2_S3, S3
_Surf-2_S4, S4
*End Assembly
**
** MATERIALS
**
*Material, name=Material-1
*Elastic
 1e+10, 0.3
** ----------------------------------------------------------------
**
** STEP: tractions
**
*Step, name=tractions, nlgeom=NO
*Static
1., 1., 1e-05, 1.
**
** BOUNDARY CONDITIONS
**
** Name: BC-1 Type: Symmetry/Antisymmetry/Encastre
*Boundary
Set-3, ENCASTRE
**
** LOADS
**
** Name: Load-1   Type: Surface traction
*Dsload
Surf-2, TRVEC, 1000., 0., 0., -1.
**
** OUTPUT REQUESTS
**
*Restart, write, frequency=0
**
** FIELD OUTPUT: F-Output-1
**
*Output, field, variable=PRESELECT
**
** HISTORY OUTPUT: H-Output-1
**
*Output, history, variable=PRESELECT
*End Step
