*Heading
** Job name: Job-1 Model name: Model-1
** Generated by: Abaqus/CAE 2022
*Preprint, echo=NO, model=NO, history=NO, contact=NO
**
** PARTS
**
*Part, name=Part-1
*Node
      1,          15.,          10.,          20.
      2,          15.,           5.,          20.
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*Element, type=C3D8R
 1, 13, 14, 17, 16,  1,  2,  5,  4
 2, 14, 15, 18, 17,  2,  3,  6,  5
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*Nset, nset=_PickedSet2, internal, generate
  1,  48,   1
*Elset, elset=_PickedSet2, internal, generate
  1,  18,   1
** Section: Section-1
*Solid Section, elset=_PickedSet2, material=Material-1
,
*End Part
**
**
** ASSEMBLY
**
*Assembly, name=Assembly
**
*Instance, name=Part-1-1, part=Part-1
*End Instance
**
*Nset, nset=_PickedSet4, internal, instance=Part-1-1, generate
  1,  48,   1
*Elset, elset=_PickedSet4, internal, instance=Part-1-1, generate
  1,  18,   1
*End Assembly
**
** MATERIALS
**
*Material, name=Material-1
*Elastic
2993., 0.3
**
** PREDEFINED FIELDS
**
** Name: Predefined Field-1   Type: Stress
*Initial Conditions, type=STRESS
_PickedSet4, 100., 0., 0., 0., 0., 0.
** ----------------------------------------------------------------
**
** STEP: Equilbrium
**
*Step, name=Equilbrium, nlgeom=NO
*Static
1., 1., 1e-05, 1.
**
** OUTPUT REQUESTS
**
*Restart, write, frequency=0
**
** FIELD OUTPUT: F-Output-1
**
*Output, field, variable=PRESELECT
**
** HISTORY OUTPUT: H-Output-1
**
*Output, history, variable=PRESELECT
*End Step
