*Heading
** Job name: Job-2 Model name: Job-1
** Generated by: Abaqus/CAE 2022
*Preprint, echo=NO, model=NO, history=NO, contact=NO
**
** PARTS
**
*Part, name=PART-1-1
*Node
      1,          15.,           0.,          20.
      2,    14.318182,           0.,          20.
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*Element, type=C3D8R
   1,   714,   715,   738,   737,     1,     2,    25,    24
   2,   715,   716,   739,   738,     2,     3,    26,    25
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*Nset, nset=_PickedSet90, internal, generate
     1,  11408,      1
*Elset, elset=_PickedSet90, internal, generate
    1,  9900,     1
** Section: Section-ASSEMBLY_PART-1-1__PICKEDSET2
*Solid Section, elset=_PickedSet90, material=MATERIAL-1
0.,
*End Part
**
**
** ASSEMBLY
**
*Assembly, name=Assembly
**
*Instance, name=PART-1-1-1, part=PART-1-1
*End Instance
**
*End Assembly
**
** MATERIALS
**
*Material, name=MATERIAL-1
*Elastic
2993., 0.3
**
** PHYSICAL CONSTANTS
**
*Physical Constants, absolute zero=0., stefan boltzmann=0.
**
** PREDEFINED FIELDS
**
** Name: Predefined Field-1   Type: Stress
*Initial Conditions, type=STRESS, file=/home/andlars/Desktop/Job-1.odb, step=1, inc=1
** ----------------------------------------------------------------
**
** STEP: Equilibrium
**
*Step, name=Equilibrium, nlgeom=NO
*Static
1., 1., 1e-05, 1.
**
** OUTPUT REQUESTS
**
*Restart, write, frequency=0
**
** FIELD OUTPUT: F-Output-1
**
*Output, field, variable=PRESELECT
**
** HISTORY OUTPUT: H-Output-1
**
*Output, history, variable=PRESELECT
*End Step
