*Heading
** Job name: Post_Tool_Pass_1 Model name: Model-2
** Generated by: Abaqus/CAE 2023
*Preprint, echo=NO, model=NO, history=NO, contact=NO
**
** PARTS
**
*Part, name=Post_Tool_Pass_1
*End Part
**
**
** ASSEMBLY
**
*Assembly, name=Assembly
**
*Instance, name=Post_Tool_Pass_1, part=Post_Tool_Pass_1
*Node
      1,           0.,           0.,           0.
      2,           0.,          10.,           0.
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*Element, type=C3D4
  1, 51, 45, 46, 65
  2, 66, 50, 57, 51
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*Nset, nset=simple_set, generate
  1,  77,   1
*Elset, elset=simple_set, generate
   1,  168,    1
** Section: Section-ASSEMBLY_POST_TOOL_PASS_0_SIMPLE_SET
*Solid Section, elset=simple_set, material=MATERIAL-1
0.,
*End Instance
**
*Nset, nset=_PickedSet20, internal, instance=Post_Tool_Pass_1
  1,  2,  6,  7,  8,  9
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*Elset, elset=_PickedSet20, internal, instance=Post_Tool_Pass_1
   1,   6,  14,  27,  32,  39
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*Nset, nset=_PickedSet21, internal, instance=Post_Tool_Pass_1
  1,  2,  6,  7,  8,  9
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*Elset, elset=_PickedSet21, internal, instance=Post_Tool_Pass_1
   1,   6,  14,  27,  32,  39
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*End Assembly
**
** MATERIALS
**
*Material, name=MATERIAL-1
*Elastic
 1.9e+11, 0.3
**
** PHYSICAL CONSTANTS
**
*Physical Constants, absolute zero=0., stefan boltzmann=0.
**
** BOUNDARY CONDITIONS
**
** Name: Boundary_Condition_0 Type: Displacement/Rotation
*Boundary
_PickedSet20, 1, 1
_PickedSet20, 2, 2
_PickedSet20, 3, 3
_PickedSet20, 4, 4
_PickedSet20, 5, 5
_PickedSet20, 6, 6
** Name: Boundary_Condition_1 Type: Displacement/Rotation
*Boundary
_PickedSet21, 1, 1
_PickedSet21, 2, 2
_PickedSet21, 3, 3
_PickedSet21, 4, 4
_PickedSet21, 5, 5
_PickedSet21, 6, 6
** ----------------------------------------------------------------
**
** STEP: Equilibrium2
**
*Initial Conditions, Type=Stress
*External Field, File=POST_TOOL_PASS_0.sim
 , , , , ,S, ,
*Step, name=Equilibrium2, nlgeom=NO
*Static
1., 1., 1e-05, 1.
**
** OUTPUT REQUESTS
**
*Restart, write, frequency=0
**
** FIELD OUTPUT: F-Output-1
**
*Output, field, variable=PRESELECT
**
** HISTORY OUTPUT: H-Output-1
**
*Output, history, variable=PRESELECT
*End Step
