*Heading
** Job name: Job-1 Model name: Model-1
** Generated by: Abaqus/CAE 2022
*Preprint, echo=NO, model=NO, history=NO, contact=NO
**
** PARTS
**
*Part, name=Initial_Geometry
*Node
      1,          25.,          15.,          50.
      2,          25.,          14.,          50.
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*Element, type=C3D8R
    1,   817,   818,   834,   833,     1,     2,    18,    17
    2,   818,   819,   835,   834,     2,     3,    19,    18
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*Nset, nset=Set-1, generate
     1,  21216,      1
*Elset, elset=Set-1, generate
     1,  18750,      1
** Section: Section-1
*Solid Section, elset=Set-1, material=Material-1
,
*End Part
**
**
** ASSEMBLY
**
*Assembly, name=Assembly
**
*Instance, name=Initial_Geometry-1, part=Initial_Geometry
*End Instance
**
*End Assembly
**
** MATERIALS
**
*Material, name=Material-1
*Elastic
 3e+08, 0.3
*Initial Conditions, type=Stress, User
** ----------------------------------------------------------------
**
** STEP: Equilbirium
**
*Step, name=Equilbirium, nlgeom=NO
*Static
1., 1., 1e-05, 1.
**
** OUTPUT REQUESTS
**
*Restart, write, frequency=0
**
** FIELD OUTPUT: F-Output-1
**
*Output, field, variable=PRESELECT
**
** HISTORY OUTPUT: H-Output-1
**
*Output, history, variable=PRESELECT
*End Step
